# Дано:
N := 27
Q_1 := (1 + 0.1*N)*10^-4 = 0.00037
ORIGIN := 1
(м/c)^3
Q_2 := (120 - N)*10^-5 = 0.00093
l1 := 0.2 + 0.01*N = 0.47  # м
l2 := 2 + 0.1*N = 4.7  # м
l3 := 2.5 + 0.1*N = 5.2  # м
l4 := 3 + 0.1*N = 5.7  # м
l5 := 3.5 + 0.1*N = 6.2  # м
l6 := 4 + 0.1*N = 6.7  # м
l7 := 5 + 0.1*N = 7.7  # м
K_м := 1 + 0.01*N = 1.27
Рц := 1.3*10^7 - 10^5*N = 10300000  # Па
Ргм := 3*10^6 + 1.2*N*10^5 = 6240000  # Па
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# Максимальная допустимая средняя скорость жидкости во всасывающей трубе
# Давление во всасывающей трубе
V_в := 1.2  # м/с
p_в := 5*10^4  # Па
# Максимальная допустимая средняя скорость жидкости во сливных трубах
# Давление в сливных трубах
p_с := 5*10^5  # Па
V_с := 2  # м/с
# Максимальная допустимая средняя скорость жидкости во нагнетательных трубах
# Давление в нагнетательных трубах
p_н := Рц
V_н := 7  # м/с
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σ := 50*10^6  # Па
# Далее в большинстве расчётов для эффективности используются матрицы Нумерация элементов матриц по правилам математики ведётся сверху вниз положительными целыми числами по порядку, поэтому номера участков в матрицах будут следующими:
# 1 - 1
# 2 - 2
# 3 - 3
# 4.1 - 4
# 4.2 - 5
# 5 - 6
# 6.1 - 7
# 6.2 - 8
# 7 - 9
# Предельно допустимые скорости
# Рассчётные расходы | Давления
Q := [Q_1 + Q_2; Q_1 + Q_2; Q_1; K_м*Q_1; K_м*Q_1; Q_2; Q_2; Q_2; Q_1 + Q_2]
Vmax := [V_в; V_н; V_н; V_н; V_с; V_н; V_н; V_с; V_с]
p := [p_в; p_н; p_н; p_н; p_с; p_н; p_н; p_с; p_с]
# Рассчётные внутренние диаметры
D := 2*sqrt(Q/(π*Vmax)) = [0.0371395; 0.0153772; 0.00820365; 0.00924504; 0.0172959; 0.0130061; 0.0130061; 0.0243322; 0.0287681]
# Рассчётные толщины стенок
δ := vectorize(D*p)/σ = [3.71395e-5; 0.00316771; 0.00168995; 0.00190448; 0.000172959; 0.00267926; 0.00267926; 0.000243322; 0.000287681]
# Выбор труб | Фактические внутренние диаметры
# Труба_1  = (38*0.4*470*ГОСТ8734 - 75)/(В10ГОСТ8733 - 87)
# Труба_2  = (22*3.2*4700*ГОСТ8734 - 75)/(В10ГОСТ8733 - 87)
# Труба_3  = (12*1.8*5200*ГОСТ8734 - 75)/(В10ГОСТ8733 - 87)
d := [
    37.2*10^-3;
    15.6*10^-3;
    8.4*10^-3;
    9.4*10^-3;
    17.4*10^-3;
    13.4*10^-3;
    13.4*10^-3;
    24.4*10^-3;
    30*10^-3
]
# Труба_4.1= (15*2.8*2900*ГОСТ8734 - 75)/(В10ГОСТ8733 - 87)
# Труба_4.2= (18*0.3*2800*ГОСТ8734 - 75)/(В10ГОСТ8733 - 87)
# Труба_5  = (19*2.8*6200*ГОСТ8734 - 75)/(В10ГОСТ8733 - 87) | Длины участков
# Труба_6.1  = (19*2.8*3300*ГОСТ8734 - 75)/(В10ГОСТ8733 - 87)
# Труба_6.2  = (28*1.8*3400*ГОСТ8734 - 75)/(В10ГОСТ8733 - 87)
l := [0.47; 4.7; 5.2; 2.9; 2.8; 6.2; 3.3; 3.4; 7.7]
# Труба_7  = (32*1*7700*ГОСТ8734 - 75)/(В10ГОСТ8733 - 87)
# Фактические скорости
V := 4*Q/(π*d^2) = [1.1961; 6.80149; 6.67657; 6.77111; 1.97614; 6.59452; 6.59452; 1.9889; 1.83912]
# Таблица 1
# [component: inputs [Vmax, V, Q*1000*60, D*1000, d*1000, l*1000]]
# Выбор жидкости
# Жидкость: масло И-20А
# Характеристики по ГОСТ 20799 - 2022:
# Плотность: 890 кг/м^3
# Кинематическая вязкость: 29 мм^2/с
ρ := 890  # кг/м^3
v := 29*10^-6  # м^2/с  # При 50С
Υ := ρ*9.81 = 8730.9
# Значения числа Рейнольдса
Re := vectorize(V*d)/v = [1534.31; 3658.73; 1933.9; 2194.77; 1185.68; 3047.13; 3047.13; 1673.42; 1902.54]
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# коэффициенты гидравлического трения
λ :=
    m ← 1
    while m ≤ 9
        λ[m] ← 64/Re[m] if Re[m] ≤ 2320
        λ[m] ← 0.3164/Re[m]^0.25 if Re[m] > 2320
        m ← m + 1
    λ
λ = [0.0417126; 0.0406821; 0.0330937; 0.0291602; 0.0539774; 0.0425857; 0.0425857; 0.038245; 0.0336392]
Потери давления в линейном сопротивлении
Δp_l := Υ*λ*(l/d)*V^2/(2*9.81) = [60549.3; 1957863; 1886602; 1940410; 165275; 1840521; 1840521; 167417; 143151]
Δp_l[1] := 0
# Линейные потери на 1 участке не учитываем так как они происходят до нососа.
# Таблица 2
# [component: inputs [l, d*1000, Q*1000*60, V, Re, λ, Δp_l]]
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ζ_вс := 0.5
ζ_сп := 2
ζ_р := 8
ζ_вр1 := 0.8
ζ_вр2 := 1
ζ_рп := 1
ζ_ф := 10
# размер гидромотора | размер насоса
l_н := 0.7  # м
l_гм := 0.9  # м
# Коэффициенты местных сопротивлений
# Скорости на каждом местном сопротивлении
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ζ_d := [ζ_рп; ζ_вс; ζ_р; ζ_вр1; ζ_вс; ζ_р; ζ_вс; ζ_р; ζ_р; ζ_вр1; ζ_вс; ζ_р; ζ_вс; ζ_р; ζ_сп; ζ_ф; ζ_вр2]
V_d := [
    V[2];
    V[2];
    V[3];
    V[3];
    V[4];
    V[4];
    V[5];
    V[5];
    V[6];
    V[6];
    V[7];
    V[7];
    V[8];
    V[8];
    V[9];
    V[9];
    V[9]
]
# Суммарные коэффициенты местных сопротивлений на каждом участке
# Потери давления на местных сопротивлениях на каждом участке
ζ := [
    0;
    ζ_рп + ζ_вс;
    ζ_р + ζ_вр1;
    ζ_вс + ζ_р;
    ζ_вс + ζ_р;
    ζ_р + ζ_вр1;
    ζ_вс + ζ_р;
    ζ_вс + ζ_р;
    ζ_сп + ζ_ф + ζ_вр2
]
Δp_m := Υ*vectorize(ζ*V^2)/(2*9.81) = [0; 30878.8; 174562; 173420; 14771.1; 170298; 164492; 14962.6; 19567]
# Потери давления на местных сопротивлениях
Δp_md := Υ*vectorize(ζ_d*V_d^2)/(2*9.81) = [20585.8; 10292.9; 158693; 15869.3; 10201.2; 163219; 868.889; 13902.2; 154816; 15481.6; 9676.02; 154816; 880.15; 14082.4; 3010.31; 15051.6; 1505.16]
# Таблица 3
# [component: inputs [Δp_md/10^6, Δp_m/10^6]]
# возможно исправить таблицу
# Общие потери давления
Δp_ц.m := Δp_m[2] + Δp_m[3] + (Δp_m[4] + Δp_l[5] + Δp_m[9])*K_м
Δp_ц.l := Δp_l[2] + Δp_l[3] + (Δp_l[4] + Δp_l[5] + Δp_l[9])*K_м
Δp_ц := Δp_ц.m + Δp_ц.l = 7360921  # Па
Δp_гм.m := Δp_m[2] + Δp_m[6] + Δp_m[7] + Δp_m[8] + Δp_m[9]
Δp_гм.l := Δp_l[2] + Δp_l[6] + Δp_l[7] + Δp_l[8] + Δp_l[9]
Δp_гм := Δp_гм.m + Δp_гм.l = 6349672  # Па
p_нц := Δp_ц + Рц = 17660921  # Па
p_нгм := Δp_гм + Ргм = 12589672  # Па
# Размещение и потери дросселя
Δp_др6.2 := p_нц - p_нгм = 5071249  # Па
d_др6.2 := sqrt(4*Q[8]/(0.8*π*sqrt(2*Δp_др6.2/ρ))) = 0.0037236  # м
ζ_др6.2 := 2*9.81*Δp_др6.2/(Υ*V[8]^2) = 2880.9
# 3. Построение характеристикик гидролиний
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# Выведем формулу нужного вида:
# Формула линейного сопротивления:
# d - внутренний диаметр
ΔP_Линейное := λ*(l/d)*(ρ*V^2/2)  # disabled  # (1)  # V - средняя скорость жидкости
# Объёмный расход:
Q := V*S  # disabled  # (2)  # S - площадь живого сечения
# Живое сечение для круглой трубы:
S := π*(d^2/4)  # disabled  # (3)
# Подставим (3) в (2) и выразим среднюю скорость жидкости:
V := (4*Q)/(π*d^2)  # disabled  # (4)
# Подставим (4) в (1):
ΔP_Линейное := λ*(l/d)*(ρ/2)*((4*Q)/(π*d^2))^2  # disabled  # (5)
# Уравнение (5) можно упростить:
ΔP_Линейное := (8*λ*l*ρ/(π^2*d^5))*Q^2  # disabled  # (10)
# Так как полные потери включают в себя линейные и местные:
Υ*λ*(l/d)*V^2/(2*9.81)
ΔP_Участка := ΔP_Местное + ΔP_Линейное  # disabled  # (6)
# Перейдём к выводу формулы местных сопротивлений:
ΔP_Местное := Σξ*ρ*V^2/2  # disabled  # (7)
# У нас уже есть скорость, выраженная через расход (4). Подставим (4) в (7), чтобы связать местные потери с расходом:
(8)
ΔP_Местное := Σξ*ρ*(4*Q/(π*d^2))^2/2  # disabled
# Упростим, как и в случае с местными сопротивлениями:
ΔP_Местное := (8*Σξ*ρ/(π^2*d^4))*Q^2  # disabled  # (9)
# Подставим уравнения (9) и (10) в уравнение (6) и вынесем Q:
ΔP_Участка := ((8*Σξ*ρ/(π^2*d^4)) + (8*λ*l*ρ/(π^2*d^5)))*Q^2  # disabled  # (11)
Δp(Q, n) :=
    ζ_уч ← ζ[n]
    ζ_уч ← ζ[n] + ζ_др6.2 if n == 8
    Q_кр ← 2320*v*π*d[n]/4
    V_i ← 4*Q/(π*d[n]^2)
    Re_уч ← V_i*d[n]/v
    λ_уч ← 0.3164/Re_уч^0.25
    Δp_кр ← ((8*ζ_уч*ρ/(π^2*d[n]^4)) + (8*λ_уч*l[n]*ρ/(π^2*d[n]^5)))*Q_кр^2
    Δp ← ((8*ζ_уч*ρ/(π^2*d[n]^4)) + (8*λ_уч*l[n]*ρ/(π^2*d[n]^5)))*Q^2
    Δp ← Δp_кр*Q/Q_кр if Q < Q_кр
    Δp
# Q - объёмный расход в кубических метрах в секунду
# n - порядковый номер участка
# Объяснение алгоритма расчета гидравлических потерь
# Программа рассчитывает потери давления Δp на участке n в зависимости от объемного расхода жидкости Q.
# 1) Учет местных сопротивлений (ζ_уч):
# Сначала программа определяет коэффициент местных потерь.
# Если это 8-й (6.2) участок, алгоритм добавляет дополнительное сопротивление (ζ_др6.2), создаваемое дросселем.
# 2) Расчет скорости и характера потока:
# По расходу Q и диаметру трубы dn вычисляется скорость потока Vi.
# Затем определяется число Рейнольдса Re_уч — безразмерная величина, которая показывает, является поток ламинарным (спокойным, слоистым) или турбулентным (хаотичным, вихревым). Это ключевой момент, так как законы сопротивления для этих режимов разные.
# 3) Определение коэффициента трения (λyч):
# Для турбулентного режима (что и предполагается в данной модели) программа использует известную эмпирическую формулу Блазиуса
# λ = 0.3164 / Re^0.25, которая связывает трение о стенки с интенсивностью турбулентности.
# 4) Расчёт потерь в зависимости от режима:
#
# А) Режим турбулентный (Q ≥ Qкр):
# Здесь потери давления растут пропорционально скорости V^1.75 , что характерно для турбулентного потока.
#
# Б) Режим ламинарный(Q < Qкр):
# Здесь потери растут почти линейно.
# Программа учитывает это, переходя на линейную аппроксимацию. Она вычисляет потери при критическом расходе Q_кр и затем пропорционально уменьшает их относительно расхода:
# Δp = Δp_кр * (Q / Qкр).
Графики
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# Для двух сечений потока, соответствующих началу и концу  гидролинии, уравнение Д.Бернулли имеет вид:
z_1 + p_1/γ + α_1*V_1^2/(2*g) = z_2 + p_2/γ + α_2*V_2^2/(2*g)  # disabled  # (12)
# Сумма трех членов:
z + p/γ + α*V^2/(2*g) = H  # disabled  # (13)
# есть полный напор H  , т.е. полный запас удельной  энергии жидкости в данном сечении потока, равный сумме  удельных энергий потока  потенциальных энергий положения и давления, а также кинетической энергии.
# Участки | длины участков на линии с гидромотором
S := [0; 2; 6; 0; 7; 8; 9]
l_s := [l_н; l[2]; l[6]; l_гм; l[7]; l[8]; l[9]]
# Нулями обозначены гидромотор и насос так как в них линейные сопротивления не учитываются
# Местные потери напора на линии с гидромотором
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# Расстояния между местными сопротивлениями на линии с гидромотором
ΔH_гм := [
    ζ_вс*V[2]^2/(2*9.81);
    ζ_рп*V[2]^2/(2*9.81);
    ζ_р*V[5]^2/(2*9.81);
    ζ_вр1*V[5]^2/(2*9.81);
    Ргм/Υ;
    ζ_вс*V[7]^2/(2*9.81);
    ζ_р*V[7]^2/(2*9.81);
    ζ_сп*V[8]^2/(2*9.81);
    Δp_др6.2/Υ;
    ζ_ф*V[9]^2/(2*9.81);
    ζ_вр2*V[9]^2/(2*9.81)
]
# Часть 5 участка которая идёт в другую сторону это не часть распределителя цилиндра?🤔
l_d := [l_н; l[2]; l[6]*0.5; l[6]*0.5; l_гм*0.5; l_гм*0.5; l[7]; l[8]*0.5; l[8]*0.5; l[9]*0.5; l[9]*0.5]
Δp_др6.2/Υ
Ргм/Υ
H_ск(x) :=
    H_ск ← 0
    return 0 if x > sum(l_s)
    n ← 1
    while n ≤ rows(S)
        n ← n + 1 if S[n] == 0
        x ← x - l_s[n]
        if x ≤ 0
            {
                break
            }
        H_ск ← V[S[n]]^2/(2*9.81)
        H_ск ← H_ск*2 if Re[S[n]] ≤ 2320
        n ← n + 1
    H_ск
return 0 if (S[n] == 0) and (x ≤ 0)
Δp_др6.2/Υ = 580.839
Ргм/Υ = 714.703
P_отн := Ргм/Δp_др6.2 = 1.23047
Υ*λ*(l/d)*V^2/(2*9.81)  # ζ_вс*Υ*V^2/(2*9.81)
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ΔH_стм(x) :=
    ΔH_стм ← 0
    n ← 1
    while n ≤ rows(l_d)
        x ← x - l_d[n]
        ΔH_стм ← ΔH_стм + ΔH_гм[n] if x ≥ 0
        if x ≤ 0
            {
                break
            }
        n ← n + 1
    ΔH_стм
ΔH_стл(x) :=
    ΔH_стл ← 0
    n ← 1
    while n ≤ rows(l_s)
        x ← x - l_s[n]
        a ← 0 if S[n] == 0
        a ← λ[S[n]]/d[S[n]]*V[S[n]]^2/(2*9.81) if S[n] ≠ 0
        ΔH_стл ← ΔH_стл + l_s[n]*a
        ΔH_стл ← ΔH_стл + x*a if x < 0
        if x ≤ 0
            {
                break
            }
        n ← n + 1
    ΔH_стл
H_ст(x) :=
    H_ст ← p_нц/Υ
    H_ст ← H_ст - ΔH_стл(x) - ΔH_стм(x)
    H_ст
H(x) :=
    H ← H_ст(x) + H_ск(x)
    H
# Объяснение алгоритмов расчёта напора
# Данный набор функций моделирует распределение полного напора H(x) вдоль трубопровода, разбитого на участки (Sections). Координата x задаёт расстояние от начала трассы.
#
# 1. Функция H_ск(x) — Расчёт скоростного напора
#
# Назначение: Определяет энергию потока, связанную со скоростью движения жидкости.
#
# Логика: Функция "проходит" по участкам, последовательно вычитая их длину из координаты x. Для участка, на котором находится точка x, вычисляется скоростной напор по формуле V² / (2 * g). Если x выходит за пределы трассы, возвращается 0 так как в баке скорость жидкости равна нулю.
#
# 2. Функция ΔH_стм(x) — Суммарные местные и аппаратные потери
#
# Назначение: Вычисляет суммарные потери напора до точки x, вызванные местными сопротивлениями (арматура, изгибы) и гидравлическими аппаратами.
#
# Логика: Цикл по участкам аналогичен H_ск(x). Для каждого пройденного участка к сумме прибавляются:
#
# Стандартные местные потери Δp_m/Υ.
#
# Учитывается дроссель на участке 6.2  Δp_др6.2/Υ.
#
# Также отдельно учитывается гидромотор Ргм/Υ.
# 3. Функция ΔH_стл(x) — Суммарные потери на трение
# Назначение: Вычисляет потери напора на гидравлическое трение по длине трубы.
# Логика: Алгоритм также проходит по участкам. Ключевое отличие — учёт частичных потерь:
# Если точка x находится за пределами текущего участка (x > 0), учитываются полные потери на этом участке: Δp_l/Υ.
# Если точка x находится внутри текущего участка (x ≤ 0), учитывается только доля потерь, пропорциональная пройденному отрезку x: x*Δp_l/Υ/l , после чего цикл прерывается.
#
# 4. Функция H_ст(x) — Расчёт располагаемого напора
#
# Назначение: Определяет напор, доступный в точке x.
#
# Логика: Исходит от начального напора, созданного насосом и последовательно вычитает из него все виды гидравлических потерь: ΔH_стл(x) и ΔH_стм(x). Напор в начале равен 0.
#
# 5. Функция H(x) — Расчёт полного напора
#
# Назначение: Определяет полный гидродинамический напор в сечении x.
#
# Логика: Представляет собой сумму располагаемого напора H_ст(x) и скоростного напора H_ск(x), что соответствует уравнению Бернулли.
#
# Итог: программы позволяет построить график напора вдоль всего трубопровода, наглядно показывая, как энергия потока расходуется на преодоление сопротивлений.
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sum(l_s) = 26.9
sum(l_d) = 26.9
# сделать не в масштабе. уменьшить полный напор, скачки на гидромоторе и дросселе, чтобы всё было наглядно. Подписать и объяснить что сделал и зачем. График так же сойдётся в 0 на баке
# ≈
# сделать 3 отдельных скачка
Др_6.2
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τ := 0.001  # c
h_ин := V[2]*l[2]/(τ*9.81) = 3258.62  # м
H_1 := p_нц/Υ = 2022.81  # м
η_ин := H_1/h_ин = 0.620756
# Инерционный напор больше рабочего напора насоса на 63.3%.
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E := 1.5*10^9  # Па
E_тр := 2*10^11  # Па
δ_2ф := 3.2*10^-3
C := 1/sqrt(ρ/E + d[2]*ρ/(E_тр*δ_2ф))
Δp_п := ρ*V[2]*C = 7718753  # Па
Δp_нп := 2*ρ*V[2]*l[2]/τ = 56901293  # Па
