# ОСНОВЫ РАСЧЁТА И ПРОЕКТИРООВАНИЯ
# РЕКУПЕРАТИВНОГО ТЕПЛООБМЕННОГО АППАРАТА ТРУБЧАТОГО ТИПА
## Исходные данные
# Номер зачётки
N := 2388327
# Тепловая производительность
# теплообменного аппарата
Q := 8.0*10^6*10^3/3600  # Дж/с
# Схема движения теплоносителей
# 2 - Противоток
# Температура греющей воды при входе
# в теплообменный аппарат
t'_1 := 135  # ⁰C
# Температура греющей воды при
# выходе из теплообменного аппарата
t''_1 := 98  # ⁰C
# Температура нагреваемой воды при
# входе в теплообменный аппарат
t'_2 := 67  # ⁰C
# Температура нагреваемой воды при
# выходе из теплообменного аппарата
t''_2 := 101  # ⁰C
# Материал трубок теплообменного
# аппарата
Латунь
# Коэффициент теплопроводности
# материала трубок
λ := 117  # Вт/(м∙К)
# Температура стенок трубок, принятая при расчёте
t_cm := 99  # ⁰C
# Наружный диаметр трубок
# теплообменного аппарата
d_н := 16*10^-3
# Внутренний диаметр трубок
# теплообменного аппарата
d_вн := 14*10^-3
# коэффициент учитывающий потери тепла поверхностью подогревателя в окружающую среду
η_n := 0.97
## Цель расчёта
# Произвести тепловой и конструктивный расчет отопительного
# секционного водоводяного подогревателя
## Расчёт и проектирование
# 1) Для греющей воды:
# Средняя температура:
t_1ср := (t'_1 + t''_1)/2 = 116.5  # ⁰C
# Массовая теплоемкость согласно таблице:
C'_p := 4.250*10^3  # Дж/кг·К
# Плотность согласно таблице:
ρ' := 943.1  # кг/м³
# Средний объемный расход:
V_1 := Q/(C'_p*(t'_1 - t''_1)*ρ'*η_n) = 0.0154478  # м^3/с
# 2) Для нагреваемой воды:
# Средняя температура:
t_2ср := (t'_2 + t''_2)/2 = 84  # ⁰C
# Массовая теплоемкость согласно таблице:
C''_p := 4.208*10^3  # Дж/кг·К
# Плотность согласно таблице:
ρ'' := 965.3  # кг/м³
# Средний объемный расход:
V_2 := Q/(C''_p*(t''_2 - t'_2)*ρ''*η_n) = 0.0165882  # м^3/с
# Рассчёт характеристик теплообменника
# Скорость жидкости:
υ_1 := 1.0  # м/c
# Площадь поперечного сечения трубок:
f_0 := V_1/υ_1 = 0.0154478  # м^2
# Рассчётное количество трубок:
n := 4*f_0/(π*d_вн^2) = 100.351
# Количество трубок согласно таблице компоновки:
n' := 130
# Внутренний диаметр корпуса:
R := 12
S := 1.4*d_н = 0.0224  # м
D' := S*R = 0.2688  # м
М := 0.008  # м
D := D' + d_н + 2*М = 0.3008  # м
# Площадь поперечного сечения корпуса теплообменника:
F := π*D^2/4 = 0.0710633  # м^2
# Площадь, занятая трубками:
f := π*d_н^2*n'/4 = 0.0261381  # м^2
# Межтрубное пространство:
f_1 := F - f = 0.0449253  # м^2
# Скорость воды в межтрубном пространстве:
υ_2 := V_2/f_1 = 0.369239  # м/с
# Действительная скорость воды в трубах:
υ'_1 := υ_1*n/n' = 0.77193  # м/с
# Режим движения греющей воды:
γ_1 := 252*10^-9  # м^2/c
Re_г := υ_1*d_вн/γ_1 = 55555.6
# Режим движения турбулентный.
# Определяем коэффициент теплопередачи:
Pr := 1.47
Pr_cm := 1.75
β := 8.64*10^4
g := 9.81  # м/c^2
# Критерий Нуссельта:
Nu := 0.021*Re_г^0.8*Pr^0.43*(Pr/Pr_cm)^0.25 = 148.258
# Критерий Грасгофа:
Gr := β*g*d_вн^3*|t_cm - t_1ср|/γ_1^2 = 6.4092e14
# Режим движения нагреваемой воды:
d_э := (4*f_1/(π*D))^0.5 = 0.436075  # м
γ_2 := 3.26*10^-7  # м^2/c
Re_н := υ_2*d_э/γ_2 = 493915
# Режим движения турбулентный.
# Коэффициент теплопереачи:
λ_1 := 0.680  # Вт/(м*К)
α_1 := Nu*λ_1/d_вн = 7201.09
λ_2 := 0.686  # Вт/(м*К)
α_2 := Nu*λ_2/d_э = 233.228
δ_cm := d_н - d_вн = 0.002  # м
K := 1/(1/α_1 + δ_cm/λ + 1/α_2) = 225.042
F_п := Q/(K*|t_cm - t_1ср|) = 564.269  # м^2
d_н.ср := (d_н + d_вн)/2
L := F_п/(π*d_н.ср*n') = 92.1089  # м
